*Heading
** Job name: Job-2 Model name: Model-1
** Generated by: Abaqus/CAE 2023
*Preprint, echo=NO, model=NO, history=NO, contact=NO
**
** PARTS
**
*Part, name=Part-1
*End Part
**
**
** ASSEMBLY
**
*Assembly, name=Assembly
**
*Instance, name=Part-1-1, part=Part-1
*Node
      1, 0.000199999995, 9.99999975e-05
      2, 0.000699999975, 9.99999975e-05
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*Element, type=CPS6
  1,  149,  146,   12,  745,  746,  747
  2,  146,  143,   11,  748,  749,  750
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*Nset, nset=Set-1, generate
    1,  2851,     1
*Elset, elset=Set-1, generate
    1,  1364,     1
** Section: Section-1
*Solid Section, elset=Set-1, material=Material-1
1.,
*End Instance
**
*Nset, nset=Set-1, instance=Part-1-1
    7,    8,  128,  129,  130,  131
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*Nset, nset=Set-2, instance=Part-1-1
    3,    4,   35,   36,   37,   38
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*Nset, nset=Set-72, instance=Part-1-1
    7,    8,  128,  129,  130,  131
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*Elset, elset=Set-72, instance=Part-1-1
  734,  743, 1301, 1315, 1317, 1319, 1322, 1324, 1327, 1328
*Nset, nset=Set-73, instance=Part-1-1
    3,    4,   35,   36,   37,   38
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*Elset, elset=Set-73, instance=Part-1-1
  29,  37, 577, 579, 581, 582, 586, 589, 590, 591
*End Assembly
**
** MATERIALS
**
*Material, name=Material-1
*Elastic
 2.1e+11, 0.3
** ----------------------------------------------------------------
**
** STEP: Step-1
**
*Step, name=Step-1, nlgeom=NO
*Static
1., 1., 1e-05, 1.
**
** BOUNDARY CONDITIONS
**
** Name: BC-1 Type: 对称/反对称/完全固定
*Boundary
Set-72, PINNED
** Name: BC-2 Type: 位移/转角
*Boundary
Set-73, 2, 2, 2e-06
**
** OUTPUT REQUESTS
**
*Restart, write, frequency=0
**
** FIELD OUTPUT: F-Output-1
**
*Output, field
*Node Output
U,
*Element Output, directions=YES
ELEDEN, ELEN, ENER, LE, PE, PEEQ, PEMAG, S
**
** HISTORY OUTPUT: H-Output-1
**
*Output, history, variable=PRESELECT
*End Step
